# PWM-initiering för robot
f_osc := 16 MHz
T_osc := 1/f_osc = 62.5 ns  # Kristall
f_PWM := 5 kHz
T_PWM := 1/f_PWM = 0.2 ms
Prescaler_TMR2 := 4
PR2 := f_osc/(4*f_PWM*Prescaler_TMR2) - 1 = 199
# Detta tal ska få plats i 8 bitar
# Ändra Prescaler för att hamna inom området
# 4:an är för att 1 timer puls = 4 clk
DutyCycle := 100%
CCPR1L&CCP1CON := DutyCycle*f_osc/(f_PWM*Prescaler_TMR2) = 800  # Alla 10 bitar
CCPR1L := CCPR1L&CCP1CON/4 = 200  # Bara de 8 största bitarna
